# ------------------------------------------------
# CASE: No description
# ------------------------------------------------
Jet
# Mach
0.8
# iYsym  iZsym  Zsym
0 0 0.0
# Sref   Cref   Bref
22.4 3.2 14.0
# Xref   Yref   Zref
0 0 0

# ------------------------------------------------
SURFACE
Main Wing
# n_chord c_spacing [n_span] [s_spacing]
10 0.0 5 0.0

YDUPLICATE
0.0

SCALE
1 1 1

SECTION
# LE_x LE_y LE_z chord angle [n_span] [s_spacing]
5.51391143903 -2.95727378225e-31 0.394353683917 3.23227137459 0.0

AIRFOIL 0.0 1.0
-0.70589371993 8.41527859236e-16
-0.738674476964 0.00870278799236
-0.771439237068 0.0174610144971
-0.804191090431 0.0260229825272
-0.836915194919 0.0342485570013
-0.86958382588 0.0420785723597
-0.902160846421 0.0495075546171
-0.934605493779 0.0565604192445
-0.966875417683 0.0632735701443
-0.998928946183 0.0696805912734
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
SECTION
# LE_x LE_y LE_z chord angle [n_span] [s_spacing]
11.743280793 7.0 0.638650160834 0.969681412378 0.0

AIRFOIL 0.0 1.0
-11.1104526117 -7.21886581576
-11.1432333687 -7.21016302777
-11.1759981288 -7.20140480127
-11.2087499822 -7.19284283324
-11.2414740867 -7.18461725876
-11.2741427176 -7.1767872434
-11.3067197382 -7.16935826115
-11.3391643855 -7.16230539652
-11.3714343094 -7.15559224562
-11.4034878379 -7.14918522449
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
# ------------------------------------------------
SURFACE
Rudder
# n_chord c_spacing [n_span] [s_spacing]
10 0.0 5 0.0

ANGLE
32.0

SCALE
1 1 1

SECTION
# LE_x LE_y LE_z chord angle [n_span] [s_spacing]
15.6709550536 0 2.30114788989 0.567097949409 0.0

SECTION
# LE_x LE_y LE_z chord angle [n_span] [s_spacing]
15.6709550536 0 4.32750372767 0.561626788647 0.0

# ------------------------------------------------
SURFACE
HTP
# n_chord c_spacing [n_span] [s_spacing]
10 0.0 5 0.0

YDUPLICATE
0.0

SCALE
1 1 1

SECTION
# LE_x LE_y LE_z chord angle [n_span] [s_spacing]
14.5031297026 -1.83288867435e-31 4.88053195108 2.02016960912 0.0

AIRFOIL 0.0 1.0
-6.17916438161 1.31896611407e-15
-6.21194513864 0.00870278799236
-6.24470989874 0.0174610144971
-6.27746175211 0.0260229825272
-6.3101858566 0.0342485570013
-6.34285448756 0.0420785723597
-6.3754315081 0.0495075546171
-6.40787615546 0.0565604192445
-6.44014607936 0.0632735701443
-6.47219960786 0.0696805912734
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
SECTION
# LE_x LE_y LE_z chord angle [n_span] [s_spacing]
17.5383672488 3.2 4.88053195108 0.606050882736 0.0

AIRFOIL 0.0 1.0
-27.9387702392 -5.28008471096
-27.9715509962 -5.27138192297
-28.0043157563 -5.26262369646
-28.0370676097 -5.25406172843
-28.0697917142 -5.24583615396
-28.1024603451 -5.2380061386
-28.1350373657 -5.23057715634
-28.167482013 -5.22352429171
-28.1997519369 -5.21681114081
-28.2318054654 -5.21040411969
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
# ------------------------------------------------
SURFACE
Vertical Bottom
# n_chord c_spacing [n_span] [s_spacing]
10 0.0 5 0.0

SCALE
1 1 1

SECTION
# LE_x LE_y LE_z chord angle [n_span] [s_spacing]
13.7701490409 -8.98050324639e-16 2.16539083404 2.4682705061 0.0

SECTION
# LE_x LE_y LE_z chord angle [n_span] [s_spacing]
13.8071834942 0 2.30114788989 2.43086950877 0.0

# ------------------------------------------------
SURFACE
Vertical Centre
# n_chord c_spacing [n_span] [s_spacing]
10 0.0 5 0.0

SCALE
1 1 1

SECTION
# LE_x LE_y LE_z chord angle [n_span] [s_spacing]
13.8071834942 0 2.30114788989 1.86377155936 0.0

SECTION
# LE_x LE_y LE_z chord angle [n_span] [s_spacing]
14.357218306 0 4.33750372767 1.31373674751 0.0

# ------------------------------------------------
SURFACE
Vertical Top
# n_chord c_spacing [n_span] [s_spacing]
10 0.0 5 0.0

SCALE
1 1 1

SECTION
# LE_x LE_y LE_z chord angle [n_span] [s_spacing]
14.357218306 0 4.33750372767 1.87533653616 0.0

SECTION
# LE_x LE_y LE_z chord angle [n_span] [s_spacing]
14.5032993117 -6.45288572617e-16 4.88053195108 1.72778935427 0.0
